// COMSOL Multiphysics 6.4.0.293 model "chip_tsv_thermal_20260216_140042.mph"
// Outline of the model tree

Parameters
  chip_size = 60[um]
  chip_thick = 5[um]
  tsv_dia = 5[um]
  heat_size = 10[um]
  tsv_heat_dist = 20[um]
  Q_heat = 1e6[W/m^2]
  T_amb = 293.15[K]

Geometry
  geom1 "Geometry 1" (3D, length unit m)
    blk1: Block "Chip" | size = {chip_size, chip_size, chip_thick}; base = center; pos = {0, 0, chip_thick/2}
    cyl1: Cylinder "TSV" | r = tsv_dia/2; h = chip_thick*2
    dif1: Difference "Chip with TSV" | input = blk1; input2 = cyl1
    fin: Finalize "Form Union"

Materials
  mat1: Common "Silicon" on all domains
    def: def "Basic"
      density = 2330[kg/m^3]
      heatcapacity = 700[J/(kg*K)]
      thermalconductivity = 130[W/(m*K)]

Physics
  ht: HeatTransfer "Heat Transfer in Solids" on all domains
    dependent variable T
    solid1: SolidHeatTransferModel "Solid 1" (default)
    init1: init "Initial Values 1" (default)
    ins1: ThermalInsulation (default)
    hf1: HeatFluxBoundary "Heat Source (Top)" on boundaries 6 | q0 = Q_heat
    temp1: TemperatureBoundary "Heat Sink (Bottom)" on boundaries 5 | T0 = T_amb

Mesh
  mesh1 "Mesh 1" (physics-controlled)

Studies
  std1 "Study 1"
    stat: Stationary

Solver configurations
  sol1 "Solution 1" (study std1)
    v1: Variables "Dependent Variables 1"
    s1: Stationary "Stationary Solver 1"
      fc1: FullyCoupled
      d1: Direct "Direct, heat transfer variables (ht)"

Datasets
  dset1: Solution | solution = sol1

Plots
  pg1: PlotGroup3D "Temperature Distribution" | data = dset1
    surf1: Surface | expr = T; unit = degC; descr = Temperature
  pg2: PlotGroup3D "Temperature Slices" | data = dset1
    slc1: Slice | expr = T; unit = degC; descr = Temperature
  pg3: PlotGroup3D "Temperature Isosurfaces" | data = dset1
    iso1: Isosurface | expr = T; unit = degC; descr = Temperature
  pg4: PlotGroup3D "Heat Flux Vectors" | data = dset1
    surf2: Surface | expr = T; unit = degC
    arwv1: ArrowVolume | expr = {ht.qx, ht.qy, ht.qz}; descr = Heat flux
  pg5: PlotGroup1D "Temperature Profile" | data = dset1
    lg1: LineGraph | expr = T; unit = degC; descr = Temperature; xdata = expr; xdataexpr = x